# Показательное распределение
0, если*x < 0
0, если*x < 0
F(x)
f(x)
1 - e^(-2*x), если(x ≥ 0)
d/dx(1 - e^(-2*x)) → 2*e^(-2*x)  # если х>=0
# Свойства плотности | Свойства функции распределения
1
2*e^(-2*x) > 0
limit(1 - e^(-2*x), x → ∞) → 1
1
2
1 - e^-2 = 0.864665
integral(2*e^(-2*x), x = 0 .. ∞) → 1
integral((x - 0.5)^2*2*e^(-2*x), x = 0 .. ∞) = 0.25
integral(x*(2*e^(-2*x)), x = 0 .. ∞) = 0.5
(1/λ)
1/2 = 0.5
1 - e^(-2*2) = 0.981684
# мат ожидание
# коэф вариации
0.5/0.5 = 1
Дисперсия
(1/λ^2)
1/4 = 0.25
# Среднее квадратичное отклонение
sqrt(1/λ^2)
integral(2*e^(-2*x), x = 0 .. 0.346574) = 0.5
sqrt(1/4) = 0.5
# мода | 2
медиана
# коэф ассиметрии
1/0.5^3*integral((x - 0.5)^3*(2*e^(-2*x)), x = 0 .. ∞) → 2.0
эксцесс
(1/0.5^4*integral((x - 0.5)^4*(2*e^(-2*x)), x = 0 .. ∞) - 3) → 6.0
Given
integral(2*e^(-2*x), x = 0 .. y) → 1 - e^(-2*y)
e^(-2*4) - 0.5 = -0.499665
